clear
units                   real
dimension               3
boundary                f p p
atom_style              full

comm_style		        tiled

comm_modify             vel yes
neighbor                1.5 bin

read_data		        N2_shock\emptybox.data extra/bond/per/atom 1#extra memory assigned to creating bonds

region                  gas_init block 2 4498 -128 128 -128 128 units box
#region                  gas_init block 10.0 581.5 10.0 581.5 10.0 581.5 units box

variable                Nsteps equal 400000
# requires 200ps to form the - mean free path pre-shock 100.5 Ang
# average molecular speed 476.2 ms^-1, average collision time = 21.1 ps
# shock speed relative to piston 270.8 ms^-1,
# expected shock width (Mott-Smith solution): u_a = 1691.7 ms^-1 (pre-shock conds: T_a = 300K), u_b = 270.8 ms^-1 (post-shock conds)
# Mott-Smith constant: A = 0.5597, giving shock width x = 2.666 lamda = 268.0 Ang
# Hence minimal time to form shock 99.0 ps (doubled to give an accurate shock formation)
variable                dt equal 0.5 # fs - note that N2 have a vibrational time period 14.1 fs
variable                seed equal 12345 # random number seed

variable                nvt_equilib equal 150000 # requires 100ps for enough collisions to equilibrate

timestep				${dt}

pair_style				lj/cut 15.0
pair_coeff              1 1 0.0739 3.29 # taken from: https://www.sciencedirect.com/science/article/pii/002240739290142Q


bond_style				harmonic
bond_coeff				1 1651 1.0977 #seperation and vibrational frequency values taken from https://cccbdb.nist.gov/exp2x.asp?casno=7727379
#harmonic vibration 2359 cm^-1 --> angluar frequency = 0.44466 rad fs^-1 --> standard spring constant vibration

molecule				N2molecule N2_shock\N2mol.data
create_atoms 		    0 random 49841 ${seed} gas_init mol N2molecule ${seed} overlap 2.0# create 7 bar pressure
velocity		        all create 300 ${seed} rot yes mom yes

log                     N2_shock\shock_log.LAMMPS append
thermo_style            custom step etotal ke pe density temp press# what to print
thermo                  1000 # print every 1000 timesteps
dump                    myDump all xyz 5000 N2_shock\dump.xyz # save coordinates every 1000 timesteps

#minimize 		1e-6 1e-6 1000 10000 # shift atom locations to minimize the potential energy of the system. Helps if we accidentally introduce atoms that are overlapping and repel each other very strongly.

fix 			        balance all balance 1000 1.2 rcb # how to assign the domain to different processors
fix                     piston all wall/reflect xlo 0.0 units box
fix                     xwalls all wall/reflect xhi 4500 units box

fix                     temp_settle all nvt temp 300.0 300.0 100
run                     ${nvt_equilib}
unfix                   temp_settle

write_restart           N2_shock\restart\restart_equilibrated.restart

unfix                   piston
variable                wall_mov equal (step-v_nvt_equilib)*dt*0.01421 #piston velocity calculated through Mach = 5.0, gamma = 9/7 = 1.286 (including vibrational mode), T = 300K
fix                     piston all wall/reflect xlo v_wall_mov units box

fix			            integrator all nve # set up F=ma integration

compute                 chunks_x all chunk/atom bin/1d x 0.0 10.0 units box
compute                 temp_chunk all temp/chunk chunks_x temp com yes
fix                     density_measure all ave/chunk 100 10 1000 chunks_x vx temp density/number bias temp_chunk norm sample file N2_shock\dens.profile

restart                 100000  N2_shock\restart\restart_shock.*
run						${Nsteps}
print                   "simulation done."

write_restart           N2_shock\restart\restart_final.restart
